Wed Jan  5 07:03:43 UTC 2022
$PROBLEM TWO COMPARTMENT ORAL

$DATA pk_oral2_30_90.csv IGNORE=#

$INPUT ID TIME AMT DV MDV

$SUBROUTINE ADVAN4 TRANS4

$PK
  CL    = THETA(1)*EXP(ETA(1)) ;CL/F
  V2    = THETA(2)*EXP(ETA(2)) ;V2/F
  Q     = THETA(3)*EXP(ETA(3)) ;Q/F
  V3    = THETA(4)*EXP(ETA(4)) ;V3/F
  KA    = THETA(5)*EXP(ETA(5)) ;Absorption rate constant
  ALAG1 = THETA(6)*EXP(ETA(6)) ;Lag time
; S2    = V2/1000  ;Scaling factor
; S3    = V3/1000  ;Scaling factor

$ERROR
  IPRED   = F
  W       = SQRT(THETA(7)**2 + THETA(8)**2 * F**2); SIGMA 1 FIX (additive plus proportional error model)
  IRES    = DV - IPRED
  IWRES   = IRES / W
  Y       = IPRED + W * EPS(1)

$THETA
  (0,100) ;POPCL/F
  (0,700) ;POPV/F
  (0,70) ;POPQ/F
  (0,500) ;POPV3/F
  (0,10) ;POPKA
  (0,1) ;POPALAG1
  0.02
  (0, 0.3, 1)

$OMEGA
  .25 ;BSVCL/F
  .25 ;BSVV/F
  0 FIX ;BSVQ/F
  .25 ;BSVV3/F
  .25 ;BSVKA
  .25 ;BSVALAG1

$SIGMA
  1 FIX ;ERRCV

;$ESTIMATION METHOD=1 POSTHOC MAXEVAL=9999 PRINT=5
$ESTIMATION NOABORT MAXEVAL=9999 METHOD=1 INTER PRINT=10 SIGDIGITS=3

$COVARIANCE PRINT=E

$TABLE ID TIME IPRED IWRES DV NOPRINT ONEHEADER FILE=sdtab4403
$TABLE ID CL V2 Q V3 KA ALAG1 NOPRINT ONEHEADER NOAPPEND FILE=patab4403

NM-TRAN MESSAGES
 WARNINGS AND ERRORS (IF ANY) FOR PROBLEM    1
 (WARNING  2) NM-TRAN INFERS THAT THE DATA ARE POPULATION.
 (WARNING  23) $PK DOES NOT DEFINE A SCALE PARAMETER FOR THE CENTRAL
 COMPARTMENT.  WITH THIS TRANS, IT MAY NOT BE POSSIBLE TO SEPARATELY
 OBTAIN ESTIMATES OF PARAMETERS AFFECTING CLEARANCE AND VOLUME.

1NONLINEAR MIXED EFFECTS MODEL PROGRAM (NONMEM) VERSION 7.5.0
 ORIGINALLY DEVELOPED BY STUART BEAL, LEWIS SHEINER, AND ALISON BOECKMANN
 CURRENT DEVELOPERS ARE ROBERT BAUER, ICON DEVELOPMENT SOLUTIONS,
 AND ALISON BOECKMANN. IMPLEMENTATION, EFFICIENCY, AND STANDARDIZATION
 PERFORMED BY NOUS INFOSYSTEMS.
 PROBLEM NO.:         1
 TWO COMPARTMENT ORAL
 TOT. NO. OF OBS RECS:       49
 TOT. NO. OF INDIVIDUALS:        6
 TWO COMPARTMENT MODEL WITH FIRST-ORDER ABSORPTION (ADVAN4)
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 #TBLN:      1
 #METH: First Order Conditional Estimation with Interaction
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
 #TERM:
0MINIMIZATION SUCCESSFUL
 HOWEVER, PROBLEMS OCCURRED WITH THE MINIMIZATION.
 REGARD THE RESULTS OF THE ESTIMATION STEP CAREFULLY, AND ACCEPT THEM ONLY
 AFTER CHECKING THAT THE COVARIANCE STEP PRODUCES REASONABLE OUTPUT.
 NO. OF FUNCTION EVALUATIONS USED:      711
 NO. OF SIG. DIGITS IN FINAL EST.:  3.3

 ETABAR IS THE ARITHMETIC MEAN OF THE ETA-ESTIMATES,
 AND THE P-VALUE IS GIVEN FOR THE NULL HYPOTHESIS THAT THE TRUE MEAN IS 0.

 ETABAR:         2.8755E+00  9.9689E-01  0.0000E+00 -8.3971E-02 -3.4809E-01 -5.3121E-03
 SE:             5.1631E-01  6.8988E-01  0.0000E+00  1.0109E-01  3.0761E-01  1.4162E-01
 N:                       6           6           6           6           6           6

 P VAL.:         2.5627E-08  1.4845E-01  1.0000E+00  4.0617E-01  2.5780E-01  9.7008E-01

 ETASHRINKSD(%)  6.2358E+01  2.4266E+01  0.0000E+00  5.4472E+01  2.0608E+01  1.6668E+01
 ETASHRINKVR(%)  8.5831E+01  4.2643E+01  0.0000E+00  7.9272E+01  3.6969E+01  3.0558E+01
 EBVSHRINKSD(%)  1.3517E+00  3.6893E+00  0.0000E+00  5.2889E+01  3.2691E+01  6.4945E+00
 EBVSHRINKVR(%)  2.6852E+00  7.2425E+00  0.0000E+00  7.7806E+01  5.4695E+01  1.2567E+01
 RELATIVEINF(%)  9.6994E+01  9.2247E+01  0.0000E+00  2.2138E+01  4.0620E+01  7.8577E+01
 EPSSHRINKSD(%)  1.0000E-10
 EPSSHRINKVR(%)  1.0000E-10


 TOTAL DATA POINTS NORMALLY DISTRIBUTED (N):           49
 N*LOG(2PI) CONSTANT TO OBJECTIVE FUNCTION:    90.055976254057924
 OBJECTIVE FUNCTION VALUE WITHOUT CONSTANT:    1444656.8691111144
 OBJECTIVE FUNCTION VALUE WITH CONSTANT:       1444746.9250873686
 REPORTED OBJECTIVE FUNCTION DOES NOT CONTAIN CONSTANT

 TOTAL EFFECTIVE ETAS (NIND*NETA):                            30


 #TERE:
 Elapsed estimation  time in seconds:     4.50
0R MATRIX ALGORITHMICALLY NON-POSITIVE-SEMIDEFINITE
 BUT NONSINGULAR
0R MATRIX IS OUTPUT
0S MATRIX UNOBTAINABLE
0COVARIANCE STEP ABORTED
 Elapsed covariance  time in seconds:     1.68
 Elapsed postprocess time in seconds:     0.03

 ********************               FIRST ORDER CONDITIONAL ESTIMATION WITH INTERACTION              ********************
 #OBJT:**************                       MINIMUM VALUE OF OBJECTIVE FUNCTION                      ********************
 #OBJV:********************************************  1444656.869       **************************************************

 ********************               FIRST ORDER CONDITIONAL ESTIMATION WITH INTERACTION              ********************
 ********************                             FINAL PARAMETER ESTIMATE                           ********************

 THETA - VECTOR OF FIXED EFFECTS PARAMETERS   *********
         TH 1      TH 2      TH 3      TH 4      TH 5      TH 6      TH 7      TH 8
         1.59E+02  8.03E+02  4.18E+01  4.54E+02  7.96E+00  3.55E-01  6.09E+00  4.34E-01

 OMEGA - COV MATRIX FOR RANDOM EFFECTS - ETAS  ********
         ETA1      ETA2      ETA3      ETA4      ETA5      ETA6
 ETA1
+        1.35E+01
 ETA2
+        0.00E+00  5.97E+00
 ETA3
+        0.00E+00  0.00E+00  0.00E+00
 ETA4
+        0.00E+00  0.00E+00  0.00E+00  3.55E-01
 ETA5
+        0.00E+00  0.00E+00  0.00E+00  0.00E+00  1.08E+00
 ETA6
+        0.00E+00  0.00E+00  0.00E+00  0.00E+00  0.00E+00  2.08E-01

 SIGMA - COV MATRIX FOR RANDOM EFFECTS - EPSILONS  ****
         EPS1
 EPS1
+        1.00E+00

 OMEGA - CORR MATRIX FOR RANDOM EFFECTS - ETAS  *******
         ETA1      ETA2      ETA3      ETA4      ETA5      ETA6
 ETA1
+        3.68E+00
 ETA2
+        0.00E+00  2.44E+00
 ETA3
+        0.00E+00  0.00E+00  0.00E+00
 ETA4
+        0.00E+00  0.00E+00  0.00E+00  5.96E-01
 ETA5
+        0.00E+00  0.00E+00  0.00E+00  0.00E+00  1.04E+00
 ETA6
+        0.00E+00  0.00E+00  0.00E+00  0.00E+00  0.00E+00  4.56E-01

 SIGMA - CORR MATRIX FOR RANDOM EFFECTS - EPSILONS  ***
         EPS1
 EPS1
+        1.00E+00
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 Elapsed finaloutput time in seconds:     0.01
 #CPUT: Total CPU Time in Seconds,        6.233
